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/batch
! ANSYS input file written by Workbench version 19.1 RELEASE
! File used for geometry attach: C:\Users\JPassos\Desktop\Simulations\aluminium-profile\simulation_files\dp0\SYS\DM\SYS.scdoc
/title,simulation--Static Structural (A5)
/com,--- Data in consistent CGS units. See Solving Units in the help system for more information.
/units,CGS
/prep7
! Turn off shape checking because checks already performed inside WB mesher.
! See help system for more information.
SHPP,OFF,,NOWARN
etcon,set             ! allow ANSYS to choose best KEYOP's for 180x elements
/com,*********** Nodes for the whole assembly ***********
nblock,3,,3840
(1i9,3e20.9e3)
        1     3.163879320E+00     2.914829684E+00    -2.608842105E+00
        2     3.163879320E+00     2.914829684E+00    -2.345684211E+00
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-1
/com,*********** Elements for Body 1 "SYS\Solid1" ***********
et,1,186
keyo,1,2,1          ! set full integration on SOLID186
eblock,19,solid,,589
(19i9)
        1        1        1        1        0        0        0        0       20        0        1        1      941      235       91      285      942      272      280
      985     1934     1365      982     2101     2066     2063     2089      983     3434     1931     1366
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-1
/com,*********** Send User Defined Coordinate System(s) ***********
csys,0
toffst,273.15,  ! Temperature offset from absolute zero
/com,*********** Set Reference Temperature ***********
tref,22.
/com,*********** Send Materials ***********
Temperature = 'TEMP' ! Temperature
MP,DENS,1,2.77,	! g cm^-3
MP,ALPX,1,2.3e-05,	! C^-1
MP,C,1,8750000,	! dyne cm g^-1 C^-1
MPTEMP,,,,,,,,
MPTEMP,1,-100
MPTEMP,2,0
MPTEMP,3,100
MPTEMP,4,200
MPDATA,KXX,1, ,11400000,14400000,16500000,17500000,	! dyne s^-1 C^-1
MPTEMP,,,,,,,,
MPTEMP,,,,,,,,
MPTEMP,1,0
MPTEMP,2,20
MPTEMP,3,100
MPDATA,RSVX,1, ,2.43e-06,2.67e-06,3.63e-06,	! ohm cm
MPTEMP,,,,,,,,
MP,EX,1,710000000000,	! dyne cm^-2
MP,NUXY,1,0.33,
MP,MURX,1,1,

!************************* Model Summary ********************
!SYS\Solid1,	Aluminum Alloy,	matid,	1
!************************* End Model Summary ********************
/com,*********** Fixed Supports ***********
CMBLOCK,_FIXEDSU,NODE,      128
(8i10)
       286       287       288       289       290       291       292       293
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
cmsel,s,_FIXEDSU
d,all,all
nsel,all
/com,********* Frictionless Supports X *********
CMBLOCK,_FRICSUX,NODE,      152
(8i10)
       335       336       337       338       339       340       341       342
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
cmsel,s,_FRICSUX
d,all,ux,0
nsel,all
/com,********* Frictionless Supports Y *********
CMBLOCK,_FRICSUY,NODE,      152
(8i10)
       753       754       755       756       757       758       759       760
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
cmsel,s,_FRICSUY
d,all,uy,0
nsel,all
/com,*********** Define Force Using Surface Effect Elements ***********
local,12,0,0.,0.,0.,0.,0.,0.
csys,0
et,2,154
eblock,10,,,31
(15i9)
      590        2        2        2       12      942      272      280      285     2066     2063     2089     2101
      591        2        2        2       12      752      285      280      733     2100     2089     2091     3086
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-1
esel,s,type,,2
keyop,2,2,1                ! Apply load in local coordinate system
keyop,2,7,1                ! Use original area so load is constant in large deformation
keyop,2,11,2               ! Use real and not project area
esel,all

*DIM,_loadvari80x,TABLE,2,1,1,TIME,
! Time values
_loadvari80x(1,0,1) = 0.
_loadvari80x(2,0,1) = 1.
! Load values
_loadvari80x(1,1,1) = 0.
_loadvari80x(2,1,1) = 0.


*DIM,_loadvari80y,TABLE,2,1,1,TIME,
! Time values
_loadvari80y(1,0,1) = 0.
_loadvari80y(2,0,1) = 1.
! Load values
_loadvari80y(1,1,1) = 0.
_loadvari80y(2,1,1) = 0.


*DIM,_loadvari80z,TABLE,2,1,1,TIME,
! Time values
_loadvari80z(1,0,1) = 0.
_loadvari80z(2,0,1) = 1.
! Load values
_loadvari80z(1,1,1) = 0.
_loadvari80z(2,1,1) = 132650591.505088

fini
/com,****************************************************************************
/com,*************************    SOLUTION       ********************************
/com,****************************************************************************
/solu
antype,0                   ! static analysis
eqsl,pcg,1e-8,,,,,,1
cntr,print,1               ! print out contact info and also make no initial contact an error
dmpoption,emat,no             ! Don't combine emat file for DANSYS
dmpoption,esav,no             ! Don't combine esav file for DANSYS
nldiag,cont,iter           ! print out contact info each equilibrium iteration
rescontrol,,none                 ! Do not keep any restart files
/com,****************************************************
/com,******************* SOLVE FOR LS 1 OF 1 ****************
esel,s,type,,2
nsle
sfe,all,1,pres,1,%_loadvari80x%
sfe,all,2,pres,1,%_loadvari80y%
sfe,all,3,pres,1,%_loadvari80z%
nsel,all
esel,all
nsub,1,1,1
time,1.
outres,erase
outres,all,none
outres,nsol,all,
outres,rsol,all
outres,strs,all,
outres,epel,all,
outres,eppl,all,
stabilize,off                   ! Stabilization turned OFF by user
! *********** WB SOLVE COMMAND ***********
! check interactive state
*get,ANSINTER_,active,,int
*if,ANSINTER_,ne,0,then
/eof
*endif
solve
/com *************** Write FE CONNECTORS *********
CEWRITE,file,ce,,INTE
/com,****************************************************
/com,*************** FINISHED SOLVE FOR LS 1 *************
*get,_PCGITER,active,,solu,cgiter
/post1
fini
